# OpenSim document version 40000
Model gait9dof18musc_Thelen_BigSpheres_scalePB:
  gravity: 0 -9.80665 0
  length_units: meters
  force_units: N
  credits:
    A planar reduced gait model with 9 degrees of freedom and 18 muscles by Ajay Seth. Adjusted by Carmichael Ong to follow muscle strengths of Handsfield/Rajagopal and changed hamstrings to follow semimembranosus. Ankle passive mechanics based on Weiss, Kearney, and Hunter 1986. Closely based on Delp S.L., Loan J.P., Hoy M.G., Zajac F.E., Topp E.L., Rosen J.M., Thelen D.G., Anderson F.C., Seth A. Notes: 3D, 23 DOF gait model created by D.G. Thelen, Univ. of Wisconsin-Madison, and Ajay Seth, Frank C. Anderson, and Scott L. Delp, Stanford University. Lower extremity joint defintions based on Delp et al. (1990). Low back joint and anthropometry based on Anderson and Pandy (1999, 2001). Planar knee model of Yamaguchi and Zajac (1989). Seth replaced tibia translation constraints with a CustomJoint for the knee and removed the patella to eliminate all kinematic constraints; insertions of the quadrucepts are handled with moving points in the tibia frame as defined by Delp 1990. Number of muscles was reduced by Anderson to improve simulation speed for demonstrations and is not intended to be used in research. License: Creative Commons (CCBY 3.0). You are free to distribute, remix, tweak, and build upon this work, even commercially, as long as you credit us for the original creation. http://creativecommons.org/licenses/by/3.0/ More Information: http://simtk-confluence.stanford.edu:8080/display/OpenSim/Gait+2392+and+2354+Models
  publications:
    Delp, S.L., Loan, J.P., Hoy, M.G., Zajac, F.E., Topp E.L., Rosen, J.M.: An interactive graphics-based model of the lower extremity to study orthopaedic surgical procedures, IEEE Transactions on Biomedical Engineering, vol. 37, pp. 757-767, 1990. Yamaguchi G.T., Zajac F.E.: A planar model of the knee joint to characterize the knee extensor mechanism." J . Biomech. vol. 22. pp. 1-10. 1989. Anderson F.C., Pandy M.G.: A dynamic optimization solution for vertical jumping in three dimensions. Computer Methods in Biomechanics and Biomedical Engineering 2:201-231, 1999. Anderson F.C., Pandy M.G.: Dynamic optimization of human walking. Journal of Biomechanical Engineering 123:381-390, 2001.
  Ground
  BodySet:
    Body pelvis: mass=11.87124 [kg] mass_center=(-0.07429055 0 0) inertia=(0.1375167 0.1375167 0.06528723 0 0 0)
        meshes=(sacrum.vtp pelvis.vtp l_pelvis.vtp)
    Body femur_r: mass=8.247761 mass_center=(0 -0.1727087 0) inertia=(0.1243753 0.03578242 0.1243753 0 0 0)
        meshes=femur_r.vtp
    Body tibia_r: mass=4.760571 mass_center=(0 -0.2142451 0) inertia=(0.08573425 0.009651877 0.08573425 0 0 0)
        meshes=(tibia_r.vtp fibula.vtp)
    Body talus_r: mass=0.1141372 mass_center=(0 0 0) inertia=(0.002149738 0.001438483 0.001438483 0 0 0)
        meshes=talus.vtp
    Body calcn_r: mass=1.281516 mass_center=(0.09584261 0.03389934 0)
        inertia=(0.002022319 0.004024728 0.004024728 0 0 0) meshes=foot.vtp
    Body toes_r: mass=0.1644394 mass_center=(0.0346 0.006 -0.0175) inertia=(7.591848e-5 0.000151837 7.591848e-5 0 0 0)
        meshes=bofoot.vtp
    Body femur_l: mass=8.247761 mass_center=(0 -0.1727087 0) inertia=(0.1243753 0.03578242 0.1243753 0 0 0)
        meshes=femur_l.vtp
    Body tibia_l: mass=4.760571 mass_center=(0 -0.2142451 0) inertia=(0.08573425 0.009651877 0.08573425 0 0 0)
        meshes=(tibia_l.vtp l_fibula.vtp)
    Body talus_l: mass=0.1141372 mass_center=(0 0 0) inertia=(0.002149738 0.001438483 0.001438483 0 0 0)
        meshes=l_talus.vtp
    Body calcn_l: mass=1.281516 mass_center=(0.09584261 0.03389934 0)
        inertia=(0.002022319 0.004024728 0.004024728 0 0 0) meshes=l_foot.vtp
    Body toes_l: mass=0.1644394 mass_center=(0.0346 0.006 0.0175) inertia=(7.591848e-5 0.000151837 7.591848e-5 0 0 0)
        meshes=l_bofoot.vtp
    Body torso: mass=25.99191 mass_center=(-0.03 0.32 0) inertia=(1.119418 0.5735642 1.086697 0 0 0)
        meshes=(hat_spine.vtp hat_jaw.vtp hat_skull.vtp hat_ribs.vtp)
    Body head: mass=0 mass_center=(0 0 0) inertia=(0 0 0 0 0 0)
  JointSet:
    PlanarJoint groundPelvis: socket_parent_frame=ground_offset socket_child_frame=pelvis_offset
      Coordinate pelvis_tilt: default_value=0 range=(-1.570796 1.570796) clamped=false
      Coordinate pelvis_tx: default_value=0 range=(-5 5) clamped=false
      Coordinate pelvis_ty: default_value=0 range=(-1 2) clamped=false
      PhysicalOffsetFrame ground_offset: socket_parent=/ground translation=(0 0 0) [meters]
      PhysicalOffsetFrame pelvis_offset: socket_parent=/bodyset/pelvis translation=(0 0 0)
    PinJoint hip_r: socket_parent_frame=pelvis_offset socket_child_frame=femur_r_offset
      Coordinate hip_flexion_r: default_value=0 range=(-2.094395 2.094395) clamped=false
      PhysicalOffsetFrame pelvis_offset: socket_parent=/bodyset/pelvis translation=(-0.07429055 -0.07036804 0.09910883)
      PhysicalOffsetFrame femur_r_offset: socket_parent=/bodyset/femur_r translation=(0 0 0)
    CustomJoint knee_r: socket_parent_frame=femur_r_offset socket_child_frame=tibia_r_offset
      Coordinate knee_angle_r: default_value=0 range=(-2.094395 0.1745329) clamped=false
      PhysicalOffsetFrame femur_r_offset: socket_parent=/bodyset/femur_r translation=(0 0 0)
      PhysicalOffsetFrame tibia_r_offset: socket_parent=/bodyset/tibia_r translation=(0 0 0)
      SpatialTransform: axes_held_at_zero=(rotation2 rotation3 translation3)
        TransformAxis rotation1: coordinates=knee_angle_r axis=(0 0 1) LinearFunction(coefficients=1 0)
        TransformAxis translation1: coordinates=knee_angle_r axis=(1 0 0)
          MultiplierFunction: scale=1.03657
            SimmSpline: x=(-2.0944 -1.74533 -1.39626 -1.0472 -0.698132 -0.349066 -0.174533 0.197344 0.337395 0.490178 1.52146 2.0944)
                y=(-0.0032 0.00179 0.00411 0.0041 0.00212 -0.001 -0.0031 -0.005227 -0.005435 -0.005574 -0.005435 -0.00525)
        TransformAxis translation2: coordinates=knee_angle_r axis=(0 1 0)
          MultiplierFunction: scale=1.015934
            SimmSpline: x=(-2.0944 -1.22173 -0.523599 -0.349066 -0.174533 0.159149 2.0944)
                y=(-0.4226 -0.4082 -0.399 -0.3976 -0.3966 -0.395264 -0.396)
    PinJoint ankle_r: socket_parent_frame=tibia_r_offset socket_child_frame=talus_r_offset
      Coordinate ankle_angle_r: default_value=0 range=(-1.570796 1.570796) clamped=false
      PhysicalOffsetFrame tibia_r_offset: socket_parent=/bodyset/tibia_r translation=(0 -0.4934409 0)
      PhysicalOffsetFrame talus_r_offset: socket_parent=/bodyset/talus_r translation=(0 0 0)
    WeldJoint subtalar_r: socket_parent_frame=talus_r_offset socket_child_frame=calcn_r_offset
      PhysicalOffsetFrame talus_r_offset: socket_parent=/bodyset/talus_r
          translation=(-0.03892911 -0.04918163 0.01272367)
      PhysicalOffsetFrame calcn_r_offset: socket_parent=/bodyset/calcn_r translation=(0 0 0)
    WeldJoint mtp_r: socket_parent_frame=calcn_r_offset socket_child_frame=toes_r_offset
      PhysicalOffsetFrame calcn_r_offset: socket_parent=/bodyset/calcn_r
          translation=(0.1713666 -0.002259956 0.001346671)
      PhysicalOffsetFrame toes_r_offset: socket_parent=/bodyset/toes_r translation=(0 0 0)
    PinJoint hip_l: socket_parent_frame=pelvis_offset socket_child_frame=femur_l_offset
      Coordinate hip_flexion_l: default_value=0 range=(-2.094395 2.094395) clamped=false
      PhysicalOffsetFrame pelvis_offset: socket_parent=/bodyset/pelvis
          translation=(-0.07429055 -0.07036804 -0.09910883)
      PhysicalOffsetFrame femur_l_offset: socket_parent=/bodyset/femur_l translation=(0 0 0)
    CustomJoint knee_l: socket_parent_frame=femur_l_offset socket_child_frame=tibia_l_offset
      Coordinate knee_angle_l: default_value=0 range=(-2.094395 0.1745329) clamped=false
      PhysicalOffsetFrame femur_l_offset: socket_parent=/bodyset/femur_l translation=(0 0 0)
      PhysicalOffsetFrame tibia_l_offset: socket_parent=/bodyset/tibia_l translation=(0 0 0)
      SpatialTransform: axes_held_at_zero=(rotation2 rotation3 translation3)
        TransformAxis rotation1: coordinates=knee_angle_l axis=(0 0 1) LinearFunction(coefficients=1 0)
        TransformAxis translation1: coordinates=knee_angle_l axis=(1 0 0)
          MultiplierFunction: scale=1.03657
            SimmSpline: x=(-2.0944 -1.74533 -1.39626 -1.0472 -0.698132 -0.349066 -0.174533 0.197344 0.337395 0.490178 1.52146 2.0944)
                y=(-0.0032 0.00179 0.00411 0.0041 0.00212 -0.001 -0.0031 -0.005227 -0.005435 -0.005574 -0.005435 -0.00525)
        TransformAxis translation2: coordinates=knee_angle_l axis=(0 1 0)
          MultiplierFunction: scale=1.015934
            SimmSpline: x=(-2.0944 -1.22173 -0.523599 -0.349066 -0.174533 0.159149 2.0944)
                y=(-0.4226 -0.4082 -0.399 -0.3976 -0.3966 -0.395264 -0.396)
    PinJoint ankle_l: socket_parent_frame=tibia_l_offset socket_child_frame=talus_l_offset
      Coordinate ankle_angle_l: default_value=0 range=(-1.047198 1.047198) clamped=false
      PhysicalOffsetFrame tibia_l_offset: socket_parent=/bodyset/tibia_l translation=(0 -0.4934409 0)
      PhysicalOffsetFrame talus_l_offset: socket_parent=/bodyset/talus_l translation=(0 0 0)
    WeldJoint subtalar_l: socket_parent_frame=talus_l_offset socket_child_frame=calcn_l_offset
      PhysicalOffsetFrame talus_l_offset: socket_parent=/bodyset/talus_l
          translation=(-0.03892911 -0.04918163 -0.01272367)
      PhysicalOffsetFrame calcn_l_offset: socket_parent=/bodyset/calcn_l translation=(0 0 0)
    WeldJoint mtp_l: socket_parent_frame=calcn_l_offset socket_child_frame=toes_l_offset
      PhysicalOffsetFrame calcn_l_offset: socket_parent=/bodyset/calcn_l
          translation=(0.1713666 -0.002259956 -0.001346671)
      PhysicalOffsetFrame toes_l_offset: socket_parent=/bodyset/toes_l translation=(0 0 0)
    PinJoint lumbar: socket_parent_frame=pelvis_offset socket_child_frame=torso_offset
      Coordinate lumbar: default_value=-0.0872665 range=(-1.570796 1.570796) clamped=false locked=true
      PhysicalOffsetFrame pelvis_offset: socket_parent=/bodyset/pelvis translation=(-0.1058141 0.08676241 0)
      PhysicalOffsetFrame torso_offset: socket_parent=/bodyset/torso translation=(0 0 0)
    WeldJoint back_0: socket_parent_frame=torso_offset socket_child_frame=head_offset
      PhysicalOffsetFrame torso_offset: socket_parent=/bodyset/torso translation=(0 0.55 0)
      PhysicalOffsetFrame head_offset: socket_parent=/bodyset/head translation=(0 0 0)
  ForceSet:
    Thelen2003Muscle [values shared by the 18 below unless stated]: optimal_force=1 max_contraction_velocity=15
        FmaxTendonStrain=0.049 activation_time_constant=0.01 [seconds] deactivation_time_constant=0.04 [seconds]
    Thelen2003Muscle hamstrings_r: max_isometric_force=4105.466 optimal_fiber_length=0.07093711
        tendon_slack_length=0.3587978 pennation_angle_at_optimal=0.2617994 [radians] FmaxMuscleStrain=0.8
      PathPoint semimem_r-P1: pelvis (-0.1252537 -0.1037636 0.08487752)
      ConditionalPathPoint semimem_r-P2: tibia_r (-0.03964885 -0.04038182 -0.02446267)
          socket_coordinate=/jointset/knee_r/knee_angle_r range=(-0.558505 0.174533) [radians]
      PathPoint semimem_r-P3: tibia_r (-0.03076204 -0.05474899 -0.02531647)
    Thelen2003Muscle bifemsh_r: max_isometric_force=557.1148 optimal_fiber_length=0.115613
        tendon_slack_length=0.1229702 pennation_angle_at_optimal=0.4014257
      PathPoint P1: femur_r (0.005182852 -0.2144636 0.02595325)
      PathPoint P2: tibia_r (-0.03429398 -0.04131133 0.03807173)
      PathPoint P3: tibia_r (-0.02666044 -0.06460633 0.04437174)
    Thelen2003Muscle glut_max_r: max_isometric_force=3337.584 optimal_fiber_length=0.1653836
        tendon_slack_length=0.05056315 pennation_angle_at_optimal=0
      PathPoint glut_max2_r-P1: pelvis (-0.141751 0.01873642 0.06682428)
      PathPoint glut_max2_r-P2: pelvis (-0.1445881 -0.05535761 0.1084856)
      PathPoint glut_max2_r-P3: femur_r (-0.0441579 -0.05384449 0.03249702)
      PathPoint glut_max2_r-P4: femur_r (-0.0161705 -0.1032189 0.04647185)
    Thelen2003Muscle iliopsoas_r: max_isometric_force=2697.344 optimal_fiber_length=0.1242207
        tendon_slack_length=0.138023 pennation_angle_at_optimal=0.1396263
      PathPoint psoas_r-P1: pelvis (-0.06798583 0.09442731 0.03430234)
      PathPoint psoas_r-P2: pelvis (-0.0250087 -0.06068046 0.09008815)
      ConditionalPathPoint psoas_r-P3: pelvis (-0.03026263 -0.08569784 0.09685366)
          socket_coordinate=/jointset/hip_r/hip_flexion_r range=(-1.5708 0.785398)
      PathPoint psoas_r-P4: femur_r (0.001658513 -0.05150784 0.004214631)
      PathPoint psoas_r-P5: femur_r (-0.01948753 -0.06065125 0.01153478)
    Thelen2003Muscle rect_fem_r: max_isometric_force=2191.741 optimal_fiber_length=0.07707845
        tendon_slack_length=0.3509098 pennation_angle_at_optimal=0.08726646 FmaxMuscleStrain=1 KshapePassive=9
      PathPoint P1: pelvis (-0.03099818 -0.03310811 0.114895)
      ConditionalPathPoint P2: femur_r (0.03462145 -0.4094213 0.002107316)
          socket_coordinate=/jointset/knee_r/knee_angle_r range=(-2.61799 -1.45997)
      MovingPathPoint P3: tibia_r socket_x_coordinate=/jointset/knee_r/knee_angle_r
          socket_y_coordinate=/jointset/knee_r/knee_angle_r socket_z_coordinate=/jointset/knee_r/knee_angle_r
        x_location: MultiplierFunction: scale=1.139335
          SimmSpline: x=(-2.0944 -1.99997 -1.5708 -1.45752 -1.39626 -1.0472 -0.698132 -0.526391 -0.349066 -0.174533 0 0.00017453 0.00034907 0.0279253 0.0872665 0.174533 2.0944)
              y=(0.0155805 0.0179938 0.0275081 0.0296564 0.0307615 0.0365695 0.0422074 0.0450902 0.048391 0.0534299 0.0617576 0.0617669 0.0617762 0.0633083 0.066994 0.0733035 0.0573481)
        y_location: MultiplierFunction: scale=1.147537
          SimmSpline: x=(-2.0944 -1.99997 -1.5708 -1.45752 -1.39626 -1.0472 -0.698132 -0.526391 -0.349066 -0.174533 0 0.00017453 0.00034907 0.0279253 0.0872665 0.174533 2.0944)
              y=(0.0234116 0.0237613 0.0251141 0.0252795 0.0253146 0.0249184 0.0242373 0.0238447 0.0234197 0.0227644 0.020984 0.0209814 0.0209788 0.0205225 0.0191754 0.0159554 -0.0673774)
        z_location: MultiplierFunction: scale=1.293637
          SimmSpline: x=(-2.0944 0.1745) y=(0.0014 0.0014)
    Thelen2003Muscle vasti_r: max_isometric_force=9593.951 optimal_fiber_length=0.09944998
        tendon_slack_length=0.1024636 pennation_angle_at_optimal=0.05235988 FmaxMuscleStrain=1 KshapePassive=9
      PathPoint vas_int_r-P1: femur_r (0.03006054 -0.1954657 0.03438252)
      PathPoint vas_int_r-P2: femur_r (0.03472511 -0.2117206 0.03160973)
      ConditionalPathPoint vas_int_r-P3: femur_r (0.03555437 -0.4094213 0.006100124)
          socket_coordinate=/jointset/knee_r/knee_angle_r range=(-2.61799 -1.42)
      MovingPathPoint vas_int_r-P4: tibia_r socket_x_coordinate=/jointset/knee_r/knee_angle_r
          socket_y_coordinate=/jointset/knee_r/knee_angle_r socket_z_coordinate=/jointset/knee_r/knee_angle_r
        x_location: MultiplierFunction: scale=1.139335
          SimmSpline: x=(-2.0944 -1.99997 -1.5708 -1.45752 -1.39626 -1.0472 -0.698132 -0.526391 -0.349066 -0.174533 0 0.00017453 0.00034907 0.0279253 0.0872665 0.174533 2.0944)
              y=(0.0082733 0.0106866 0.0202042 0.022353 0.0234583 0.0292715 0.0349465 0.037871 0.0412569 0.0465287 0.0554632 0.0554735 0.0554837 0.0571717 0.061272 0.0684368 0.0648818)
        y_location: MultiplierFunction: scale=1.147537
          SimmSpline: x=(-2.0944 -1.99997 -1.5708 -1.45752 -1.39626 -1.0472 -0.698132 -0.526391 -0.349066 -0.174533 0 0.00017453 0.00034907 0.0279253 0.0872665 0.174533 2.0944)
              y=(0.025599 0.0259487 0.0273124 0.0274796 0.0275151 0.0271363 0.0265737 0.0263073 0.0261187 0.0260129 0.0252923 0.0252911 0.0252898 0.0250526 0.0242191 0.0218288 -0.0685706)
        z_location: MultiplierFunction: scale=1.293637
          SimmSpline: x=(-2.0944 2.0944) y=(0.0018 0.0018)
    Thelen2003Muscle gastroc_r: max_isometric_force=4690.574 optimal_fiber_length=0.05855751
        tendon_slack_length=0.4409036 pennation_angle_at_optimal=0.296706 FmaxTendonStrain=0.1
      PathPoint med_gas_r-P1: femur_r (-0.01969484 -0.3991604 -0.02606417)
      ConditionalPathPoint med_gas_r-P2: femur_r (-0.03109711 -0.4086086 -0.02861513)
          socket_coordinate=/jointset/knee_r/knee_angle_r range=(-0.785398 0.174533)
      PathPoint med_gas_r-P3: calcn_r (0 0.03502932 -0.006608662)
    Thelen2003Muscle soleus_r: max_isometric_force=7924.997 optimal_fiber_length=0.05038125
        tendon_slack_length=0.2793869 pennation_angle_at_optimal=0.4363323 FmaxTendonStrain=0.1
      PathPoint P1: tibia_r (-0.002734404 -0.1759174 0.009184821)
      PathPoint P2: calcn_r (0 0.03502932 -0.006608662)
    Thelen2003Muscle tib_ant_r: max_isometric_force=2116.818 optimal_fiber_length=0.07787395
        tendon_slack_length=0.2725588 pennation_angle_at_optimal=0.08726646
      PathPoint P1: tibia_r (0.02039409 -0.18636 0.01487682)
      PathPoint P2: tibia_r (0.03748412 -0.4533918 -0.02289737)
      PathPoint P3: calcn_r (0.1117525 0.02011361 -0.03803098)
    Thelen2003Muscle hamstrings_l: max_isometric_force=4105.466 optimal_fiber_length=0.07093711
        tendon_slack_length=0.3587978 pennation_angle_at_optimal=0.2617994 FmaxMuscleStrain=0.8
      PathPoint semimem_l-P1: pelvis (-0.1252537 -0.1037636 -0.08487752)
      ConditionalPathPoint semimem_l-P2: tibia_l (-0.03964885 -0.04038182 0.02446267)
          socket_coordinate=/jointset/knee_l/knee_angle_l range=(-0.558505 0.174533)
      PathPoint semimem_l-P3: tibia_l (-0.03076204 -0.05474899 0.02531647)
    Thelen2003Muscle bifemsh_l: max_isometric_force=557.1148 optimal_fiber_length=0.115613
        tendon_slack_length=0.1229702 pennation_angle_at_optimal=0.4014257
      PathPoint P1: femur_l (0.005182852 -0.2144636 -0.02595325)
      PathPoint P2: tibia_l (-0.03429398 -0.04131133 -0.03807173)
      PathPoint P3: tibia_l (-0.02666044 -0.06460633 -0.04437174)
    Thelen2003Muscle glut_max_l: max_isometric_force=3337.584 optimal_fiber_length=0.1653836
        tendon_slack_length=0.05056315 pennation_angle_at_optimal=0
      PathPoint glut_max2_l-P1: pelvis (-0.141751 0.01873642 -0.06682428)
      PathPoint glut_max2_l-P2: pelvis (-0.1445881 -0.05535761 -0.1084856)
      PathPoint glut_max2_l-P3: femur_l (-0.0441579 -0.05384449 -0.03249702)
      PathPoint glut_max2_l-P4: femur_l (-0.0161705 -0.1032189 -0.04647185)
    Thelen2003Muscle iliopsoas_l: max_isometric_force=2697.344 optimal_fiber_length=0.1242207
        tendon_slack_length=0.138023 pennation_angle_at_optimal=0.1396263
      PathPoint psoas_l-P1: pelvis (-0.06798583 0.09442731 -0.03430234)
      PathPoint psoas_l-P2: pelvis (-0.0250087 -0.06068046 -0.09008815)
      ConditionalPathPoint psoas_l-P3: pelvis (-0.03026263 -0.08569784 -0.09685366)
          socket_coordinate=/jointset/hip_l/hip_flexion_l range=(-1.5708 0.785398)
      PathPoint psoas_l-P4: femur_l (0.001658513 -0.05150784 -0.004214631)
      PathPoint psoas_l-P5: femur_l (-0.01948753 -0.06065125 -0.01153478)
    Thelen2003Muscle rect_fem_l: max_isometric_force=2191.741 optimal_fiber_length=0.07707845
        tendon_slack_length=0.3509098 pennation_angle_at_optimal=0.08726646 FmaxMuscleStrain=1 KshapePassive=9
      PathPoint P1: pelvis (-0.03099818 -0.03310811 -0.114895)
      ConditionalPathPoint P2: femur_l (0.03462145 -0.4094213 -0.002107316)
          socket_coordinate=/jointset/knee_l/knee_angle_l range=(-2.61799 -1.45997)
      MovingPathPoint P3: tibia_l socket_x_coordinate=/jointset/knee_l/knee_angle_l
          socket_y_coordinate=/jointset/knee_l/knee_angle_l socket_z_coordinate=/jointset/knee_l/knee_angle_l
        x_location: MultiplierFunction: scale=1.139335
          SimmSpline: x=(-2.0944 -1.99997 -1.5708 -1.45752 -1.39626 -1.0472 -0.698132 -0.526391 -0.349066 -0.174533 0 0.00017453 0.00034907 0.0279253 0.0872665 0.174533 2.0944)
              y=(0.0155805 0.0179938 0.0275081 0.0296564 0.0307615 0.0365695 0.0422074 0.0450902 0.048391 0.0534299 0.0617576 0.0617669 0.0617762 0.0633083 0.066994 0.0733035 0.0573481)
        y_location: MultiplierFunction: scale=1.147537
          SimmSpline: x=(-2.0944 -1.99997 -1.5708 -1.45752 -1.39626 -1.0472 -0.698132 -0.526391 -0.349066 -0.174533 0 0.00017453 0.00034907 0.0279253 0.0872665 0.174533 2.0944)
              y=(0.0234116 0.0237613 0.0251141 0.0252795 0.0253146 0.0249184 0.0242373 0.0238447 0.0234197 0.0227644 0.020984 0.0209814 0.0209788 0.0205225 0.0191754 0.0159554 -0.0673774)
        z_location: MultiplierFunction: scale=1.293637
          SimmSpline: x=(-2.0944 0.1745) y=(-0.0014 -0.0014)
    Thelen2003Muscle vasti_l: max_isometric_force=9593.951 optimal_fiber_length=0.09944998
        tendon_slack_length=0.1024636 pennation_angle_at_optimal=0.05235988 FmaxMuscleStrain=1 KshapePassive=9
      PathPoint vas_int_l-P1: femur_l (0.03006054 -0.1954657 -0.03438252)
      PathPoint vas_int_l-P2: femur_l (0.03472511 -0.2117206 -0.03160973)
      ConditionalPathPoint vas_int_l-P3: femur_l (0.03555437 -0.4094213 -0.006100124)
          socket_coordinate=/jointset/knee_l/knee_angle_l range=(-2.61799 -1.42)
      MovingPathPoint vas_int_l-P4: tibia_l socket_x_coordinate=/jointset/knee_l/knee_angle_l
          socket_y_coordinate=/jointset/knee_l/knee_angle_l socket_z_coordinate=/jointset/knee_l/knee_angle_l
        x_location: MultiplierFunction: scale=1.139335
          SimmSpline: x=(-2.0944 -1.99997 -1.5708 -1.45752 -1.39626 -1.0472 -0.698132 -0.526391 -0.349066 -0.174533 0 0.00017453 0.00034907 0.0279253 0.0872665 0.174533 2.0944)
              y=(0.0082733 0.0106866 0.0202042 0.022353 0.0234583 0.0292715 0.0349465 0.037871 0.0412569 0.0465287 0.0554632 0.0554735 0.0554837 0.0571717 0.061272 0.0684368 0.0648818)
        y_location: MultiplierFunction: scale=1.147537
          SimmSpline: x=(-2.0944 -1.99997 -1.5708 -1.45752 -1.39626 -1.0472 -0.698132 -0.526391 -0.349066 -0.174533 0 0.00017453 0.00034907 0.0279253 0.0872665 0.174533 2.0944)
              y=(0.025599 0.0259487 0.0273124 0.0274796 0.0275151 0.0271363 0.0265737 0.0263073 0.0261187 0.0260129 0.0252923 0.0252911 0.0252898 0.0250526 0.0242191 0.0218288 -0.0685706)
        z_location: MultiplierFunction: scale=1.293637
          SimmSpline: x=(-2.0944 2.0944) y=(-0.0018 -0.0018)
    Thelen2003Muscle gastroc_l: max_isometric_force=4690.574 optimal_fiber_length=0.05855751
        tendon_slack_length=0.4409036 pennation_angle_at_optimal=0.296706 FmaxTendonStrain=0.1
      PathPoint med_gas_l-P1: femur_l (-0.01969484 -0.3991604 0.02606417)
      ConditionalPathPoint med_gas_l-P2: femur_l (-0.03109711 -0.4086086 0.02861513)
          socket_coordinate=/jointset/knee_l/knee_angle_l range=(-0.785398 0.174533)
      PathPoint med_gas_l-P3: calcn_l (0 0.03502932 0.006608662)
    Thelen2003Muscle soleus_l: max_isometric_force=7924.997 optimal_fiber_length=0.05038125
        tendon_slack_length=0.2793869 pennation_angle_at_optimal=0.4363323 FmaxTendonStrain=0.1
      PathPoint P1: tibia_l (-0.002734404 -0.1759174 -0.009184821)
      PathPoint P2: calcn_l (0 0.03502932 0.006608662)
    Thelen2003Muscle tib_ant_l: max_isometric_force=2116.818 optimal_fiber_length=0.07787395
        tendon_slack_length=0.2725588 pennation_angle_at_optimal=0.08726646
      PathPoint P1: tibia_l (0.02039409 -0.18636 -0.01487682)
      PathPoint P2: tibia_l (0.03748412 -0.4533918 0.02289737)
      PathPoint P3: calcn_l (0.1117525 0.02011361 0.03803098)
    SmoothSphereHalfSpaceForce contactHeel_r: socket_sphere=/contactgeometryset/heel_r
        socket_half_space=/contactgeometryset/floor stiffness=3067776 [N/m^2] dissipation=2 [s/m] static_friction=0.8
        dynamic_friction=0.8 viscous_friction=0.5 transition_velocity=0.2 [m/s] derivative_smoothing=1e-5
        hertz_smoothing=300 hunt_crossley_smoothing=50
    SmoothSphereHalfSpaceForce contactHeel_l: socket_sphere=/contactgeometryset/heel_l
        socket_half_space=/contactgeometryset/floor stiffness=3067776 dissipation=2 static_friction=0.8
        dynamic_friction=0.8 viscous_friction=0.5 transition_velocity=0.2 derivative_smoothing=1e-5 hertz_smoothing=300
        hunt_crossley_smoothing=50
    SmoothSphereHalfSpaceForce contactFront_r: socket_sphere=/contactgeometryset/front_r
        socket_half_space=/contactgeometryset/floor stiffness=3067776 dissipation=2 static_friction=0.8
        dynamic_friction=0.8 viscous_friction=0.5 transition_velocity=0.2 derivative_smoothing=1e-5 hertz_smoothing=300
        hunt_crossley_smoothing=50
    SmoothSphereHalfSpaceForce contactFront_l: socket_sphere=/contactgeometryset/front_l
        socket_half_space=/contactgeometryset/floor stiffness=3067776 dissipation=2 static_friction=0.8
        dynamic_friction=0.8 viscous_friction=0.5 transition_velocity=0.2 derivative_smoothing=1e-5 hertz_smoothing=300
        hunt_crossley_smoothing=50
    CoordinateLimitForce [values shared by the 6 below unless stated]: upper_stiffness=20 [N*m/degree]
        lower_stiffness=20 [N*m/degree] damping=0.25 transition=10 [degrees]
    CoordinateLimitForce HipLimit_r: coordinate=hip_flexion_r upper_limit=120 [degrees] lower_limit=-30 [degrees]
    CoordinateLimitForce HipLimit_l: coordinate=hip_flexion_l upper_limit=120 lower_limit=-30
    CoordinateLimitForce KneeLimit_r: coordinate=knee_angle_r upper_limit=0 lower_limit=-140
    CoordinateLimitForce KneeLimit_l: coordinate=knee_angle_l upper_limit=0 lower_limit=-140
    CoordinateLimitForce AnkleLimit_r: coordinate=ankle_angle_r upper_limit=20 lower_limit=-40
    CoordinateLimitForce AnkleLimit_l: coordinate=ankle_angle_l upper_limit=20 lower_limit=-40
  MarkerSet:
    Marker C7: torso (-0.075 0.439 0.003) fixed=true
    Marker STER: torso (0.046 0.37 0) fixed=true
    Marker RASI: pelvis (0.01576179 0.01064569 0.1543012) fixed=true
    Marker LASI: pelvis (0.01576179 0.01064569 -0.1543012) fixed=true
    Marker RPSI: pelvis (-0.1786336 0.04258278 0.05934661) fixed=true
    Marker LPSI: pelvis (-0.1786336 0.04258278 -0.05934661) fixed=true
    Marker RTHI: femur_r (0.02280455 -0.2844615 0.06654681)
    Marker RTH2: femur_r (0.06219423 -0.2031868 0.06654681)
    Marker RTH3: femur_r (-0.02073141 -0.2031868 0.06654681)
    Marker RGTR: femur_r (0 -0.02031868 0.08872907)
    Marker RKNE: femur_r (0.008292564 -0.4266922 0.06100124) fixed=true
    Marker RKNM: femur_r (0.01140228 -0.4317718 -0.06100124) fixed=true
    Marker RTIB: tibia_r (0.01139335 -0.3213103 0.0776182)
    Marker RSH2: tibia_r (0.04557339 -0.2295074 0.0776182)
    Marker RSH3: tibia_r (-0.0227867 -0.2295074 0.0776182)
    Marker RANK: tibia_r (-0.004557339 -0.4704901 0.07503093) fixed=true
    Marker RMED: tibia_r (0.006836009 -0.4590148 -0.04915819) fixed=true
    Marker RMT1: calcn_r (0.1773088 0.02485952 -0.03117294) fixed=true
    Marker RMT5: calcn_r (0.1341797 0.01920963 0.06858046) fixed=true
    Marker RHEE: calcn_r (-0.02396065 0.04519912 -0.01246917) fixed=true
    Marker LTHI: femur_l (0.02280455 -0.2844615 -0.06654681)
    Marker LTH2: femur_l (0.06219423 -0.2031868 -0.06654681)
    Marker LTH3: femur_l (-0.02073141 -0.2031868 -0.06654681)
    Marker LGTR: femur_l (0 -0.02031868 -0.08872907)
    Marker LKNE: femur_l (0.008292564 -0.4266922 -0.06100124) fixed=true
    Marker LKNM: femur_l (0.01140228 -0.4317718 0.06100124) fixed=true
    Marker LANK: tibia_l (-0.004557339 -0.4704901 -0.07503093) fixed=true
    Marker LTIB: tibia_l (0.01139335 -0.3213103 -0.0776182)
    Marker LSH2: tibia_l (0.04557339 -0.2295074 -0.0776182)
    Marker LSH3: tibia_l (-0.0227867 -0.2295074 -0.0776182)
    Marker LMED: tibia_l (0.006836009 -0.4590148 0.04915819) fixed=true
    Marker LMT1: calcn_l (0.1773088 0.02485952 0.03117294) fixed=true
    Marker LHEE: calcn_l (-0.02396065 0.04519912 0.01246917) fixed=true
    Marker LMT5: calcn_l (0.1341797 0.01920963 -0.06858046) fixed=true
    Marker LTOE: calcn_l (0.1198033 0.05649891 0)
    Marker RTOE: calcn_r (0.1198033 0.05649891 0)
    Marker R_HJC: femur_r (0 0 0) fixed=true
    Marker L_HJC: femur_l (0 0 0) fixed=true
    Marker SACR: pelvis (-0.1786336 0.04258278 0) fixed=true
  ContactGeometrySet:
    ContactHalfSpace floor: socket_frame=/ground orientation=(0 0 -1.570796)
    ContactSphere heel_r: socket_frame=/bodyset/calcn_r radius=0.035 location=(0.03130753 0.01043584 0)
    ContactSphere heel_l: socket_frame=/bodyset/calcn_l radius=0.035 location=(0.03130753 0.01043584 0)
    ContactSphere front_r: socket_frame=/bodyset/calcn_r radius=0.015 location=(0.1774093 -0.01565376 0.005217921)
    ContactSphere front_l: socket_frame=/bodyset/calcn_l radius=0.015 location=(0.1774093 -0.01565376 -0.005217921)
